*Heading
** Job name: CPFEM_Try2poly Model name: Model-1
** Generated by: Abaqus/CAE 6.12-1
*Preprint, echo=NO, model=NO, history=NO, contact=NO
**
** PARTS
**
*Part, name=Part-2
*Node
      1, -0.585306168,         17.5
      2,        -17.5,         17.5
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*Element, type=CPS4R
 1,   1,  17, 103,  37
 2,  17,  18, 104, 103
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*Element, type=CPS3
91, 184, 205, 185
144, 239, 227, 212
145, 244, 216, 217
146, 233, 230, 225
230, 286, 274, 287
231,  11, 272,  74
232, 283, 284, 282
*Nset, nset=Set-1
   1,   2,   3,   4,   5,   6
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*Elset, elset=Set-1, generate
  1,  54,   1
*Nset, nset=Set-2
   1,   5,   7,   8,   9,  10
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*Elset, elset=Set-2, generate
 55,  90,   1
*Nset, nset=Set-3
   3,   4,  15,  16,  33,  34
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*Elset, elset=Set-3, generate
 195,  229,    1
*Nset, nset=Set-4
   3,   5,   6,  10,  11,  15
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*Elset, elset=Set-4, generate
 230,  261,    1
*Nset, nset=Set-5
  11,  12,  13,  15,  16,  61
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*Elset, elset=Set-5, generate
 144,  194,    1
*Nset, nset=Set-6
   7,   9,  10,  11,  12,  13
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*Elset, elset=Set-6, generate
  91,  143,    1
** Section: Section-1
*Solid Section, elset=Set-1, controls=EC-1, material=Material-1
,
** Section: Section-2
*Solid Section, elset=Set-2, controls=EC-1, material=Material-2
,
** Section: Section-6
*Solid Section, elset=Set-6, controls=EC-1, material=Material6
,
** Section: Section-5
*Solid Section, elset=Set-5, controls=EC-1, material=Material5
,
** Section: Section-3
*Solid Section, elset=Set-3, controls=EC-1, material=Material3
,
** Section: Section-4
*Solid Section, elset=Set-4, controls=EC-1, material=Material4
,
*End Part
**
**
** ASSEMBLY
**
*Assembly, name=Assembly
**
*Instance, name=Part-2-1, part=Part-2
*End Instance
**
*Nset, nset=Set-5, instance=Part-2-1
   2,   4,  16,  25,  26,  27,  28,  29,  95,  96,  97,  98,  99, 100, 101, 102
*Elset, elset=Set-5, instance=Part-2-1
   9,  18,  27,  36,  45,  54, 196, 200, 202, 204, 205, 210, 212, 216, 228
*Nset, nset=Set-6, instance=Part-2-1
 13, 14, 16, 64, 65, 66
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*Elset, elset=Set-6, instance=Part-2-1
  94, 104, 106, 107, 119, 148, 149, 157, 158, 161, 165, 167, 172, 175, 177, 178
*Nset, nset=Set-7, instance=Part-2-1
  7,  8, 14, 41, 42, 43, 44, 45, 68, 69, 70, 71, 72, 73
*Elset, elset=Set-7, instance=Part-2-1
  55,  56,  57,  58,  59,  60,  93,  95, 107, 112, 113, 114, 116
*End Assembly
**
** ELEMENT CONTROLS
**
*Section Controls, name=EC-1, hourglass=ENHANCED
1., 1., 1.
**
** MATERIALS
**
*Material, name=Material-1
**
*USER MATERIAL,CONSTANTS=160,UNSYMM
**
** All the constants below must be real numbers!
**
    168400., 121400., 75400. ,
**    c11  ,   c12  ,   c44  , (elastic constants of copper crystal)
**    MPa  ,   MPa  ,   MPa  ,
**
      0.   ,
** constants only used for an elastic orthotropic or anisotropic material
**    MPa  ,
**
      0.   ,
** constants only used for an elastic anisotropic material
**    MPa  ,
**
** The elastic constants above are relative to crystal axes, where
**   1 -- [100],  2 -- [010],  3 -- [001] .  These elastic constants
**   are arranged in the following order:
**   eight constants each line (data card)
**
** (1) isotropic:
**     E    ,  Nu      (Young's modulus and Poisson's ratio)
**     0.
**     0.
**
** (2) cubic:
**     c11  ,  c12  ,  c44
**     0.
**     0.
**
** (3) orthotropic:
**     D1111,  D1122,  D2222,  D1133,  D2233,  D3333,  D1212,  D1313,
**     D2233
**     0.
**
** (4) anisotropic:
**     D1111,  D1122,  D2222,  D1133,  D2233,  D3333,  D1112,  D2212,
**     D3312,  D1212,  D1113,  D2213,  D3313,  D1213,  D1313,  D1123,
**     D2223,  D3323,  D1223,  D1323,  D2323
**
**
      1.   ,
** number of sets of slip systems
**    --   ,
**
      1.   ,   1.   ,   1.   ,   1.   ,   1.   ,   0.   ,
**    normal to slip plane   ,      slip direction      , of the 1st set
**    --   ,   --   ,   --   ,   --   ,   --   ,   --   ,
**
      0.   ,
**    normal to slip plane   ,      slip direction      , of the 2nd set
**    --   ,   --   ,   --   ,   --   ,   --   ,   --   ,
**
      0.   ,
**    normal to slip plane   ,      slip direction      , of the 3rd set
**    --   ,
**
**
      0.  ,   0.   ,   1.   ,   0.   ,   0.   ,   1.   ,
** direction in local system ,      global system       , of the 1st vector
**    ---  ,   --   ,   --   ,   --   ,   --   ,   --   ,
** (the first vector to determine crystal orientation in global system)
**
      0.   ,   1.   ,   0.   ,   0.   ,   1.   ,   0.   ,
** direction in local system ,      global system       , of the 2nd vector
**    --   ,   --   ,   --   ,   --   ,   --   ,   --   ,
** (the second vector to determine crystal orientation in global system)
**
** constraint:  The angle between two non-parallel vectors in the local
**              and global systems should be the same.  The relative
**              difference must be less than 0.1%.
**
**
      50.  ,  .001  ,
**     m   ,  adot  , of 1st set of slip systems
**    ---  ,  1/sec ,
** (power hardening exponent and hardening coefficient)
**  gammadot = adot * ( tau / g ) ** n
**
** Users who want to use their own constitutive relation may change the
**   function subprograms F and DFDX called by the subroutine
**   STRAINRATE and provide the necessary data (no more than 8) in the
**   above line (data card).
**
**
      0.   ,   0.
**    n    ,  adot  , of 2nd set of slip systems
**    ---  ,  1/sec ,
**
      0.   ,   0.   ,
**    n    ,  adot  , of 3rd set of slip systems
**    --   ,  1/sec ,
**
**
     541.5 ,  109.5 ,  60.8  ,
**    h0   ,  taus  ,  tau0  , of 1st set of slip systems
**    MPa  ,   MPa  ,   MPa  ,
** (initial hardening modulus, saturation stress and initial critical
**  resolved shear stress)
**  H = H0 * { sech [ H0 * gamma / (taus - tau0 ) ] } ** 2
**
** Users who want to use their own self-hardening law may change the
**   function subprogram HSELF called by the subroutine LATENTHARDEN
**   and provide the necessary data (no more than 8) in the above line
**   (data card).
**
**
      1.   ,   1.   ,
**    q    ,   q1   , Latent hardening of 1st set of slip systems
**    --   ,   --   ,
** (ratios of latent to self-hardening in the same and different sets
**   of slip systems)
**
** Users who want to use their own latent-hardening may change the
**   function subprogram HLATNT called by the subroutine LATENTHARDEN
**   and provide the additional data (beyond the self-hardening data,
**   no more than 8) in the above line (data card).
**
**
      0.   ,
**    h0   ,  taus  ,  tau0  , of 2nd set of slip systems
**    MPa  ,   MPa  ,   Mpa  ,
**
      0.   ,
**    q    ,   q1   , of 2nd set of slip systems
**    --   ,   --   ,
**
      0.   ,
**    h0   ,  taus  ,  tau0  , of 3rd set of slip systems
**    MPa  ,   MPa  ,   MPa  ,
**
      0.   ,
**    q    ,   q1   , of 3rd set of slip systems
**    --   ,   --   ,
**
**
      .5   ,   1.   ,
**   THETA , NLGEOM ,
**    --   ,   --   ,
**
** THETA:  implicit integration parameter, between 0 and 1
**
** NLGEOM:  parameter determining whether finite deformation of single
**   crystal is considered
**
**   NLGEOM=0. --- small deformation
**   otherwise --- finite rotation and finite strain,  Users must
**                 declare "NLGEOM" in the input file, at the *STEP
**                 card
**
**
      1.   ,   10.  , 1.E-5  ,
**  ITRATN , ITRMAX , GAMERR ,
**    --   ,   --   ,   --   ,
** ITRATN:  parameter determining whether iteration method is used to
**   solve increments of stresses and state variables in terms of
**   strain increments
**
**   ITRATN=0. --- no iteration
**   otherwise --- iteration
**
** ITRMAX:  maximum number of iterations
**
** GAMERR:  absolute error of shear strains in slip systems
**
**
*DEPVAR
125
**   number of state dependent variables, must be larger than (or equal
**   to) ten times total number of slip systems in all sets, plus
**   five, plus the additional number of state variables users
**   introduced for their own single crystal model
**
** For example, {110}<111> has twelve slip systems.  There are
**   12*10+5=125 state dependent variables.
**
**
*Material, name=Material-2
**
*USER MATERIAL,CONSTANTS=160,UNSYMM
**
** All the constants below must be real numbers!
**
    168400., 121400., 75400. ,
**    c11  ,   c12  ,   c44  , (elastic constants of copper crystal)
**    MPa  ,   MPa  ,   MPa  ,
**
      0.   ,
** constants only used for an elastic orthotropic or anisotropic material
**    MPa  ,
**
      0.   ,
** constants only used for an elastic anisotropic material
**    MPa  ,
**
** The elastic constants above are relative to crystal axes, where
**   1 -- [100],  2 -- [010],  3 -- [001] .  These elastic constants
**   are arranged in the following order:
**   eight constants each line (data card)
**
** (1) isotropic:
**     E    ,  Nu      (Young's modulus and Poisson's ratio)
**     0.
**     0.
**
** (2) cubic:
**     c11  ,  c12  ,  c44
**     0.
**     0.
**
** (3) orthotropic:
**     D1111,  D1122,  D2222,  D1133,  D2233,  D3333,  D1212,  D1313,
**     D2233
**     0.
**
** (4) anisotropic:
**     D1111,  D1122,  D2222,  D1133,  D2233,  D3333,  D1112,  D2212,
**     D3312,  D1212,  D1113,  D2213,  D3313,  D1213,  D1313,  D1123,
**     D2223,  D3323,  D1223,  D1323,  D2323
**
**
      1.   ,
** number of sets of slip systems
**    --   ,
**
      1.   ,   1.   ,   1.   ,   1.   ,   1.   ,   0.   ,
**    normal to slip plane   ,      slip direction      , of the 1st set
**    --   ,   --   ,   --   ,   --   ,   --   ,   --   ,
**
      0.   ,
**    normal to slip plane   ,      slip direction      , of the 2nd set
**    --   ,   --   ,   --   ,   --   ,   --   ,   --   ,
**
      0.   ,
**    normal to slip plane   ,      slip direction      , of the 3rd set
**    --   ,
**
**
      -1.  ,   0.   ,   1.   ,   0.   ,   0.   ,   1.   ,
** direction in local system ,      global system       , of the 1st vector
**    ---  ,   --   ,   --   ,   --   ,   --   ,   --   ,
** (the first vector to determine crystal orientation in global system)
**
      0.   ,   1.   ,   0.   ,   0.   ,   1.   ,   0.   ,
** direction in local system ,      global system       , of the 2nd vector
**    --   ,   --   ,   --   ,   --   ,   --   ,   --   ,
** (the second vector to determine crystal orientation in global system)
**
** constraint:  The angle between two non-parallel vectors in the local
**              and global systems should be the same.  The relative
**              difference must be less than 0.1%.
**
**
      50.  ,  .001  ,
**     m   ,  adot  , of 1st set of slip systems
**    ---  ,  1/sec ,
** (power hardening exponent and hardening coefficient)
**  gammadot = adot * ( tau / g ) ** n
**
** Users who want to use their own constitutive relation may change the
**   function subprograms F and DFDX called by the subroutine
**   STRAINRATE and provide the necessary data (no more than 8) in the
**   above line (data card).
**
**
      0.   ,   0.
**    n    ,  adot  , of 2nd set of slip systems
**    ---  ,  1/sec ,
**
      0.   ,   0.   ,
**    n    ,  adot  , of 3rd set of slip systems
**    --   ,  1/sec ,
**
**
     541.5 ,  109.5 ,  60.8  ,
**    h0   ,  taus  ,  tau0  , of 1st set of slip systems
**    MPa  ,   MPa  ,   MPa  ,
** (initial hardening modulus, saturation stress and initial critical
**  resolved shear stress)
**  H = H0 * { sech [ H0 * gamma / (taus - tau0 ) ] } ** 2
**
** Users who want to use their own self-hardening law may change the
**   function subprogram HSELF called by the subroutine LATENTHARDEN
**   and provide the necessary data (no more than 8) in the above line
**   (data card).
**
**
      1.   ,   1.   ,
**    q    ,   q1   , Latent hardening of 1st set of slip systems
**    --   ,   --   ,
** (ratios of latent to self-hardening in the same and different sets
**   of slip systems)
**
** Users who want to use their own latent-hardening may change the
**   function subprogram HLATNT called by the subroutine LATENTHARDEN
**   and provide the additional data (beyond the self-hardening data,
**   no more than 8) in the above line (data card).
**
**
      0.   ,
**    h0   ,  taus  ,  tau0  , of 2nd set of slip systems
**    MPa  ,   MPa  ,   Mpa  ,
**
      0.   ,
**    q    ,   q1   , of 2nd set of slip systems
**    --   ,   --   ,
**
      0.   ,
**    h0   ,  taus  ,  tau0  , of 3rd set of slip systems
**    MPa  ,   MPa  ,   MPa  ,
**
      0.   ,
**    q    ,   q1   , of 3rd set of slip systems
**    --   ,   --   ,
**
**
      .5   ,   1.   ,
**   THETA , NLGEOM ,
**    --   ,   --   ,
**
** THETA:  implicit integration parameter, between 0 and 1
**
** NLGEOM:  parameter determining whether finite deformation of single
**   crystal is considered
**
**   NLGEOM=0. --- small deformation
**   otherwise --- finite rotation and finite strain,  Users must
**                 declare "NLGEOM" in the input file, at the *STEP
**                 card
**
**
      1.   ,   10.  , 1.E-5  ,
**  ITRATN , ITRMAX , GAMERR ,
**    --   ,   --   ,   --   ,
** ITRATN:  parameter determining whether iteration method is used to
**   solve increments of stresses and state variables in terms of
**   strain increments
**
**   ITRATN=0. --- no iteration
**   otherwise --- iteration
**
** ITRMAX:  maximum number of iterations
**
** GAMERR:  absolute error of shear strains in slip systems
**
**
*DEPVAR
125
**   number of state dependent variables, must be larger than (or equal
**   to) ten times total number of slip systems in all sets, plus
**   five, plus the additional number of state variables users
**   introduced for their own single crystal model
**
** For example, {110}<111> has twelve slip systems.  There are
**   12*10+5=125 state dependent variables.
**
**
*Material, name=Material3
**
*USER MATERIAL,CONSTANTS=160,UNSYMM
**
** All the constants below must be real numbers!
**
    168400., 121400., 75400. ,
**    c11  ,   c12  ,   c44  , (elastic constants of copper crystal)
**    MPa  ,   MPa  ,   MPa  ,
**
      0.   ,
** constants only used for an elastic orthotropic or anisotropic material
**    MPa  ,
**
      0.   ,
** constants only used for an elastic anisotropic material
**    MPa  ,
**
** The elastic constants above are relative to crystal axes, where
**   1 -- [100],  2 -- [010],  3 -- [001] .  These elastic constants
**   are arranged in the following order:
**   eight constants each line (data card)
**
** (1) isotropic:
**     E    ,  Nu      (Young's modulus and Poisson's ratio)
**     0.
**     0.
**
** (2) cubic:
**     c11  ,  c12  ,  c44
**     0.
**     0.
**
** (3) orthotropic:
**     D1111,  D1122,  D2222,  D1133,  D2233,  D3333,  D1212,  D1313,
**     D2233
**     0.
**
** (4) anisotropic:
**     D1111,  D1122,  D2222,  D1133,  D2233,  D3333,  D1112,  D2212,
**     D3312,  D1212,  D1113,  D2213,  D3313,  D1213,  D1313,  D1123,
**     D2223,  D3323,  D1223,  D1323,  D2323
**
**
      1.   ,
** number of sets of slip systems
**    --   ,
**
      1.   ,   1.   ,   1.   ,   1.   ,   1.   ,   0.   ,
**    normal to slip plane   ,      slip direction      , of the 1st set
**    --   ,   --   ,   --   ,   --   ,   --   ,   --   ,
**
      0.   ,
**    normal to slip plane   ,      slip direction      , of the 2nd set
**    --   ,   --   ,   --   ,   --   ,   --   ,   --   ,
**
      0.   ,
**    normal to slip plane   ,      slip direction      , of the 3rd set
**    --   ,
**
**
      0.  ,   0.   ,   1.   ,   0., 0.707107, 0.707107,
** direction in local system ,      global system       , of the 1st vector
**    ---  ,   --   ,   --   ,   --   ,   --   ,   --   ,
** (the first vector to determine crystal orientation in global system)
**
      0.   ,   1.   ,   0.   ,   0., -0.707107, 0.707107,
** direction in local system ,      global system       , of the 2nd vector
**    --   ,   --   ,   --   ,   --   ,   --   ,   --   ,
** (the second vector to determine crystal orientation in global system)
**
** constraint:  The angle between two non-parallel vectors in the local
**              and global systems should be the same.  The relative
**              difference must be less than 0.1%.
**
**
      50.  ,  .001  ,
**     m   ,  adot  , of 1st set of slip systems
**    ---  ,  1/sec ,
** (power hardening exponent and hardening coefficient)
**  gammadot = adot * ( tau / g ) ** n
**
** Users who want to use their own constitutive relation may change the
**   function subprograms F and DFDX called by the subroutine
**   STRAINRATE and provide the necessary data (no more than 8) in the
**   above line (data card).
**
**
      0.   ,   0.
**    n    ,  adot  , of 2nd set of slip systems
**    ---  ,  1/sec ,
**
      0.   ,   0.   ,
**    n    ,  adot  , of 3rd set of slip systems
**    --   ,  1/sec ,
**
**
     541.5 ,  109.5 ,  60.8  ,
**    h0   ,  taus  ,  tau0  , of 1st set of slip systems
**    MPa  ,   MPa  ,   MPa  ,
** (initial hardening modulus, saturation stress and initial critical
**  resolved shear stress)
**  H = H0 * { sech [ H0 * gamma / (taus - tau0 ) ] } ** 2
**
** Users who want to use their own self-hardening law may change the
**   function subprogram HSELF called by the subroutine LATENTHARDEN
**   and provide the necessary data (no more than 8) in the above line
**   (data card).
**
**
      1.   ,   1.   ,
**    q    ,   q1   , Latent hardening of 1st set of slip systems
**    --   ,   --   ,
** (ratios of latent to self-hardening in the same and different sets
**   of slip systems)
**
** Users who want to use their own latent-hardening may change the
**   function subprogram HLATNT called by the subroutine LATENTHARDEN
**   and provide the additional data (beyond the self-hardening data,
**   no more than 8) in the above line (data card).
**
**
      0.   ,
**    h0   ,  taus  ,  tau0  , of 2nd set of slip systems
**    MPa  ,   MPa  ,   Mpa  ,
**
      0.   ,
**    q    ,   q1   , of 2nd set of slip systems
**    --   ,   --   ,
**
      0.   ,
**    h0   ,  taus  ,  tau0  , of 3rd set of slip systems
**    MPa  ,   MPa  ,   MPa  ,
**
      0.   ,
**    q    ,   q1   , of 3rd set of slip systems
**    --   ,   --   ,
**
**
      .5   ,   1.   ,
**   THETA , NLGEOM ,
**    --   ,   --   ,
**
** THETA:  implicit integration parameter, between 0 and 1
**
** NLGEOM:  parameter determining whether finite deformation of single
**   crystal is considered
**
**   NLGEOM=0. --- small deformation
**   otherwise --- finite rotation and finite strain,  Users must
**                 declare "NLGEOM" in the input file, at the *STEP
**                 card
**
**
      1.   ,   10.  , 1.E-5  ,
**  ITRATN , ITRMAX , GAMERR ,
**    --   ,   --   ,   --   ,
** ITRATN:  parameter determining whether iteration method is used to
**   solve increments of stresses and state variables in terms of
**   strain increments
**
**   ITRATN=0. --- no iteration
**   otherwise --- iteration
**
** ITRMAX:  maximum number of iterations
**
** GAMERR:  absolute error of shear strains in slip systems
**
**
*DEPVAR
125
**   number of state dependent variables, must be larger than (or equal
**   to) ten times total number of slip systems in all sets, plus
**   five, plus the additional number of state variables users
**   introduced for their own single crystal model
**
** For example, {110}<111> has twelve slip systems.  There are
**   12*10+5=125 state dependent variables.
**
**
*Material, name=Material4
**
*USER MATERIAL,CONSTANTS=160,UNSYMM
**
** All the constants below must be real numbers!
**
    168400., 121400., 75400. ,
**    c11  ,   c12  ,   c44  , (elastic constants of copper crystal)
**    MPa  ,   MPa  ,   MPa  ,
**
      0.   ,
** constants only used for an elastic orthotropic or anisotropic material
**    MPa  ,
**
      0.   ,
** constants only used for an elastic anisotropic material
**    MPa  ,
**
** The elastic constants above are relative to crystal axes, where
**   1 -- [100],  2 -- [010],  3 -- [001] .  These elastic constants
**   are arranged in the following order:
**   eight constants each line (data card)
**
** (1) isotropic:
**     E    ,  Nu      (Young's modulus and Poisson's ratio)
**     0.
**     0.
**
** (2) cubic:
**     c11  ,  c12  ,  c44
**     0.
**     0.
**
** (3) orthotropic:
**     D1111,  D1122,  D2222,  D1133,  D2233,  D3333,  D1212,  D1313,
**     D2233
**     0.
**
** (4) anisotropic:
**     D1111,  D1122,  D2222,  D1133,  D2233,  D3333,  D1112,  D2212,
**     D3312,  D1212,  D1113,  D2213,  D3313,  D1213,  D1313,  D1123,
**     D2223,  D3323,  D1223,  D1323,  D2323
**
**
      1.   ,
** number of sets of slip systems
**    --   ,
**
      1.   ,   1.   ,   1.   ,   1.   ,   1.   ,   0.   ,
**    normal to slip plane   ,      slip direction      , of the 1st set
**    --   ,   --   ,   --   ,   --   ,   --   ,   --   ,
**
      0.   ,
**    normal to slip plane   ,      slip direction      , of the 2nd set
**    --   ,   --   ,   --   ,   --   ,   --   ,   --   ,
**
      0.   ,
**    normal to slip plane   ,      slip direction      , of the 3rd set
**    --   ,
**
**
      0.  ,   0.   ,   1.   ,   0.125868, 0.531962, 0.837361,
** direction in local system ,      global system       , of the 1st vector
**    ---  ,   --   ,   --   ,   --   ,   --   ,   --   ,
** (the first vector to determine crystal orientation in global system)
**
      0.   ,   1.   ,   0.   ,   -0.192805, -0.814862, 0.546651,
** direction in local system ,      global system       , of the 2nd vector
**    --   ,   --   ,   --   ,   --   ,   --   ,   --   ,
** (the second vector to determine crystal orientation in global system)
**
** constraint:  The angle between two non-parallel vectors in the local
**              and global systems should be the same.  The relative
**              difference must be less than 0.1%.
**
**
      50.  ,  .001  ,
**     m   ,  adot  , of 1st set of slip systems
**    ---  ,  1/sec ,
** (power hardening exponent and hardening coefficient)
**  gammadot = adot * ( tau / g ) ** n
**
** Users who want to use their own constitutive relation may change the
**   function subprograms F and DFDX called by the subroutine
**   STRAINRATE and provide the necessary data (no more than 8) in the
**   above line (data card).
**
**
      0.   ,   0.
**    n    ,  adot  , of 2nd set of slip systems
**    ---  ,  1/sec ,
**
      0.   ,   0.   ,
**    n    ,  adot  , of 3rd set of slip systems
**    --   ,  1/sec ,
**
**
     541.5 ,  109.5 ,  60.8  ,
**    h0   ,  taus  ,  tau0  , of 1st set of slip systems
**    MPa  ,   MPa  ,   MPa  ,
** (initial hardening modulus, saturation stress and initial critical
**  resolved shear stress)
**  H = H0 * { sech [ H0 * gamma / (taus - tau0 ) ] } ** 2
**
** Users who want to use their own self-hardening law may change the
**   function subprogram HSELF called by the subroutine LATENTHARDEN
**   and provide the necessary data (no more than 8) in the above line
**   (data card).
**
**
      1.   ,   1.   ,
**    q    ,   q1   , Latent hardening of 1st set of slip systems
**    --   ,   --   ,
** (ratios of latent to self-hardening in the same and different sets
**   of slip systems)
**
** Users who want to use their own latent-hardening may change the
**   function subprogram HLATNT called by the subroutine LATENTHARDEN
**   and provide the additional data (beyond the self-hardening data,
**   no more than 8) in the above line (data card).
**
**
      0.   ,
**    h0   ,  taus  ,  tau0  , of 2nd set of slip systems
**    MPa  ,   MPa  ,   Mpa  ,
**
      0.   ,
**    q    ,   q1   , of 2nd set of slip systems
**    --   ,   --   ,
**
      0.   ,
**    h0   ,  taus  ,  tau0  , of 3rd set of slip systems
**    MPa  ,   MPa  ,   MPa  ,
**
      0.   ,
**    q    ,   q1   , of 3rd set of slip systems
**    --   ,   --   ,
**
**
      .5   ,   1.   ,
**   THETA , NLGEOM ,
**    --   ,   --   ,
**
** THETA:  implicit integration parameter, between 0 and 1
**
** NLGEOM:  parameter determining whether finite deformation of single
**   crystal is considered
**
**   NLGEOM=0. --- small deformation
**   otherwise --- finite rotation and finite strain,  Users must
**                 declare "NLGEOM" in the input file, at the *STEP
**                 card
**
**
      1.   ,   10.  , 1.E-5  ,
**  ITRATN , ITRMAX , GAMERR ,
**    --   ,   --   ,   --   ,
** ITRATN:  parameter determining whether iteration method is used to
**   solve increments of stresses and state variables in terms of
**   strain increments
**
**   ITRATN=0. --- no iteration
**   otherwise --- iteration
**
** ITRMAX:  maximum number of iterations
**
** GAMERR:  absolute error of shear strains in slip systems
**
**
*DEPVAR
125
**   number of state dependent variables, must be larger than (or equal
**   to) ten times total number of slip systems in all sets, plus
**   five, plus the additional number of state variables users
**   introduced for their own single crystal model
**
** For example, {110}<111> has twelve slip systems.  There are
**   12*10+5=125 state dependent variables.
**
**
*Material, name=Material5
**
*USER MATERIAL,CONSTANTS=160,UNSYMM
**
** All the constants below must be real numbers!
**
    168400., 121400., 75400. ,
**    c11  ,   c12  ,   c44  , (elastic constants of copper crystal)
**    MPa  ,   MPa  ,   MPa  ,
**
      0.   ,
** constants only used for an elastic orthotropic or anisotropic material
**    MPa  ,
**
      0.   ,
** constants only used for an elastic anisotropic material
**    MPa  ,
**
** The elastic constants above are relative to crystal axes, where
**   1 -- [100],  2 -- [010],  3 -- [001] .  These elastic constants
**   are arranged in the following order:
**   eight constants each line (data card)
**
** (1) isotropic:
**     E    ,  Nu      (Young's modulus and Poisson's ratio)
**     0.
**     0.
**
** (2) cubic:
**     c11  ,  c12  ,  c44
**     0.
**     0.
**
** (3) orthotropic:
**     D1111,  D1122,  D2222,  D1133,  D2233,  D3333,  D1212,  D1313,
**     D2233
**     0.
**
** (4) anisotropic:
**     D1111,  D1122,  D2222,  D1133,  D2233,  D3333,  D1112,  D2212,
**     D3312,  D1212,  D1113,  D2213,  D3313,  D1213,  D1313,  D1123,
**     D2223,  D3323,  D1223,  D1323,  D2323
**
**
      1.   ,
** number of sets of slip systems
**    --   ,
**
      1.   ,   1.   ,   1.   ,   1.   ,   1.   ,   0.   ,
**    normal to slip plane   ,      slip direction      , of the 1st set
**    --   ,   --   ,   --   ,   --   ,   --   ,   --   ,
**
      0.   ,
**    normal to slip plane   ,      slip direction      , of the 2nd set
**    --   ,   --   ,   --   ,   --   ,   --   ,   --   ,
**
      0.   ,
**    normal to slip plane   ,      slip direction      , of the 3rd set
**    --   ,
**
**
      0.  ,   0.   ,   1.   ,   0.173833, 0.639177, 0.749157,
** direction in local system ,      global system       , of the 1st vector
**    ---  ,   --   ,   --   ,   --   ,   --   ,   --   ,
** (the first vector to determine crystal orientation in global system)
**
      0.   ,   1.   ,   0.   ,   -0.196602, -0.722899, 0.662393,
** direction in local system ,      global system       , of the 2nd vector
**    --   ,   --   ,   --   ,   --   ,   --   ,   --   ,
** (the second vector to determine crystal orientation in global system)
**
** constraint:  The angle between two non-parallel vectors in the local
**              and global systems should be the same.  The relative
**              difference must be less than 0.1%.
**
**
      50.  ,  .001  ,
**     m   ,  adot  , of 1st set of slip systems
**    ---  ,  1/sec ,
** (power hardening exponent and hardening coefficient)
**  gammadot = adot * ( tau / g ) ** n
**
** Users who want to use their own constitutive relation may change the
**   function subprograms F and DFDX called by the subroutine
**   STRAINRATE and provide the necessary data (no more than 8) in the
**   above line (data card).
**
**
      0.   ,   0.
**    n    ,  adot  , of 2nd set of slip systems
**    ---  ,  1/sec ,
**
      0.   ,   0.   ,
**    n    ,  adot  , of 3rd set of slip systems
**    --   ,  1/sec ,
**
**
     541.5 ,  109.5 ,  60.8  ,
**    h0   ,  taus  ,  tau0  , of 1st set of slip systems
**    MPa  ,   MPa  ,   MPa  ,
** (initial hardening modulus, saturation stress and initial critical
**  resolved shear stress)
**  H = H0 * { sech [ H0 * gamma / (taus - tau0 ) ] } ** 2
**
** Users who want to use their own self-hardening law may change the
**   function subprogram HSELF called by the subroutine LATENTHARDEN
**   and provide the necessary data (no more than 8) in the above line
**   (data card).
**
**
      1.   ,   1.   ,
**    q    ,   q1   , Latent hardening of 1st set of slip systems
**    --   ,   --   ,
** (ratios of latent to self-hardening in the same and different sets
**   of slip systems)
**
** Users who want to use their own latent-hardening may change the
**   function subprogram HLATNT called by the subroutine LATENTHARDEN
**   and provide the additional data (beyond the self-hardening data,
**   no more than 8) in the above line (data card).
**
**
      0.   ,
**    h0   ,  taus  ,  tau0  , of 2nd set of slip systems
**    MPa  ,   MPa  ,   Mpa  ,
**
      0.   ,
**    q    ,   q1   , of 2nd set of slip systems
**    --   ,   --   ,
**
      0.   ,
**    h0   ,  taus  ,  tau0  , of 3rd set of slip systems
**    MPa  ,   MPa  ,   MPa  ,
**
      0.   ,
**    q    ,   q1   , of 3rd set of slip systems
**    --   ,   --   ,
**
**
      .5   ,   1.   ,
**   THETA , NLGEOM ,
**    --   ,   --   ,
**
** THETA:  implicit integration parameter, between 0 and 1
**
** NLGEOM:  parameter determining whether finite deformation of single
**   crystal is considered
**
**   NLGEOM=0. --- small deformation
**   otherwise --- finite rotation and finite strain,  Users must
**                 declare "NLGEOM" in the input file, at the *STEP
**                 card
**
**
      1.   ,   10.  , 1.E-5  ,
**  ITRATN , ITRMAX , GAMERR ,
**    --   ,   --   ,   --   ,
** ITRATN:  parameter determining whether iteration method is used to
**   solve increments of stresses and state variables in terms of
**   strain increments
**
**   ITRATN=0. --- no iteration
**   otherwise --- iteration
**
** ITRMAX:  maximum number of iterations
**
** GAMERR:  absolute error of shear strains in slip systems
**
**
*DEPVAR
125
**   number of state dependent variables, must be larger than (or equal
**   to) ten times total number of slip systems in all sets, plus
**   five, plus the additional number of state variables users
**   introduced for their own single crystal model
**
** For example, {110}<111> has twelve slip systems.  There are
**   12*10+5=125 state dependent variables.
**
**
*Material, name=Material6
**
*USER MATERIAL,CONSTANTS=160,UNSYMM
**
** All the constants below must be real numbers!
**
    168400., 121400., 75400. ,
**    c11  ,   c12  ,   c44  , (elastic constants of copper crystal)
**    MPa  ,   MPa  ,   MPa  ,
**
      0.   ,
** constants only used for an elastic orthotropic or anisotropic material
**    MPa  ,
**
      0.   ,
** constants only used for an elastic anisotropic material
**    MPa  ,
**
** The elastic constants above are relative to crystal axes, where
**   1 -- [100],  2 -- [010],  3 -- [001] .  These elastic constants
**   are arranged in the following order:
**   eight constants each line (data card)
**
** (1) isotropic:
**     E    ,  Nu      (Young's modulus and Poisson's ratio)
**     0.
**     0.
**
** (2) cubic:
**     c11  ,  c12  ,  c44
**     0.
**     0.
**
** (3) orthotropic:
**     D1111,  D1122,  D2222,  D1133,  D2233,  D3333,  D1212,  D1313,
**     D2233
**     0.
**
** (4) anisotropic:
**     D1111,  D1122,  D2222,  D1133,  D2233,  D3333,  D1112,  D2212,
**     D3312,  D1212,  D1113,  D2213,  D3313,  D1213,  D1313,  D1123,
**     D2223,  D3323,  D1223,  D1323,  D2323
**
**
      1.   ,
** number of sets of slip systems
**    --   ,
**
      1.   ,   1.   ,   1.   ,   1.   ,   1.   ,   0.   ,
**    normal to slip plane   ,      slip direction      , of the 1st set
**    --   ,   --   ,   --   ,   --   ,   --   ,   --   ,
**
      0.   ,
**    normal to slip plane   ,      slip direction      , of the 2nd set
**    --   ,   --   ,   --   ,   --   ,   --   ,   --   ,
**
      0.   ,
**    normal to slip plane   ,      slip direction      , of the 3rd set
**    --   ,
**
**
      0.  ,   0.   ,   1.   ,   0.214899, 0.629051, 0.74707,
** direction in local system ,      global system       , of the 1st vector
**    ---  ,   --   ,   --   ,   --   ,   --   ,   --   ,
** (the first vector to determine crystal orientation in global system)
**
      0.   ,   1.   ,   0.   ,   -0.241513, -0.706955, 0.664745,
** direction in local system ,      global system       , of the 2nd vector
**    --   ,   --   ,   --   ,   --   ,   --   ,   --   ,
** (the second vector to determine crystal orientation in global system)
**
** constraint:  The angle between two non-parallel vectors in the local
**              and global systems should be the same.  The relative
**              difference must be less than 0.1%.
**
**
      50.  ,  .001  ,
**     m   ,  adot  , of 1st set of slip systems
**    ---  ,  1/sec ,
** (power hardening exponent and hardening coefficient)
**  gammadot = adot * ( tau / g ) ** n
**
** Users who want to use their own constitutive relation may change the
**   function subprograms F and DFDX called by the subroutine
**   STRAINRATE and provide the necessary data (no more than 8) in the
**   above line (data card).
**
**
      0.   ,   0.
**    n    ,  adot  , of 2nd set of slip systems
**    ---  ,  1/sec ,
**
      0.   ,   0.   ,
**    n    ,  adot  , of 3rd set of slip systems
**    --   ,  1/sec ,
**
**
     541.5 ,  109.5 ,  60.8  ,
**    h0   ,  taus  ,  tau0  , of 1st set of slip systems
**    MPa  ,   MPa  ,   MPa  ,
** (initial hardening modulus, saturation stress and initial critical
**  resolved shear stress)
**  H = H0 * { sech [ H0 * gamma / (taus - tau0 ) ] } ** 2
**
** Users who want to use their own self-hardening law may change the
**   function subprogram HSELF called by the subroutine LATENTHARDEN
**   and provide the necessary data (no more than 8) in the above line
**   (data card).
**
**
      1.   ,   1.   ,
**    q    ,   q1   , Latent hardening of 1st set of slip systems
**    --   ,   --   ,
** (ratios of latent to self-hardening in the same and different sets
**   of slip systems)
**
** Users who want to use their own latent-hardening may change the
**   function subprogram HLATNT called by the subroutine LATENTHARDEN
**   and provide the additional data (beyond the self-hardening data,
**   no more than 8) in the above line (data card).
**
**
      0.   ,
**    h0   ,  taus  ,  tau0  , of 2nd set of slip systems
**    MPa  ,   MPa  ,   Mpa  ,
**
      0.   ,
**    q    ,   q1   , of 2nd set of slip systems
**    --   ,   --   ,
**
      0.   ,
**    h0   ,  taus  ,  tau0  , of 3rd set of slip systems
**    MPa  ,   MPa  ,   MPa  ,
**
      0.   ,
**    q    ,   q1   , of 3rd set of slip systems
**    --   ,   --   ,
**
**
      .5   ,   1.   ,
**   THETA , NLGEOM ,
**    --   ,   --   ,
**
** THETA:  implicit integration parameter, between 0 and 1
**
** NLGEOM:  parameter determining whether finite deformation of single
**   crystal is considered
**
**   NLGEOM=0. --- small deformation
**   otherwise --- finite rotation and finite strain,  Users must
**                 declare "NLGEOM" in the input file, at the *STEP
**                 card
**
**
      1.   ,   10.  , 1.E-5  ,
**  ITRATN , ITRMAX , GAMERR ,
**    --   ,   --   ,   --   ,
** ITRATN:  parameter determining whether iteration method is used to
**   solve increments of stresses and state variables in terms of
**   strain increments
**
**   ITRATN=0. --- no iteration
**   otherwise --- iteration
**
** ITRMAX:  maximum number of iterations
**
** GAMERR:  absolute error of shear strains in slip systems
**
**
*DEPVAR
125
**   number of state dependent variables, must be larger than (or equal
**   to) ten times total number of slip systems in all sets, plus
**   five, plus the additional number of state variables users
**   introduced for their own single crystal model
**
** For example, {110}<111> has twelve slip systems.  There are
**   12*10+5=125 state dependent variables.
**
**
** ----------------------------------------------------------------
**
** STEP: Step-1
**
*Step, name=Step-1, nlgeom=YES, inc=1000
*Static
0.01, 1., 1e-05, 0.1
**
** BOUNDARY CONDITIONS
**
** Name: BC-1 Type: Displacement/Rotation
*Boundary
Set-5, 1, 1
** Name: BC-2 Type: Displacement/Rotation
*Boundary
Set-6, 2, 2
Set-6, 3, 3
** Name: BC-4 Type: Displacement/Rotation
*Boundary
Set-7, 1, 1, 0.1
**
** OUTPUT REQUESTS
**
*Restart, write, frequency=0
**
** FIELD OUTPUT: F-Output-1
**
*Output, field
*Node Output
CF, RF, U
*Element Output, directions=YES
LE, PE, PEEQ, PEMAG, S, SDV
*Contact Output
CDISP, CSTRESS
**
** HISTORY OUTPUT: H-Output-1
**
*Output, history, variable=PRESELECT
*End Step
